# OpenSim document version 40000
Model osimModel:
  gravity: 0 -9.80665 0
  credits: Matt DeMers
  PhysicalOffsetFrame Cyl1_frame: socket_parent=/bodyset/linkage1 translation=(0 0.25 0) [meters]
    Cylinder Cyl1_frame_geom_1: radius=0.03 half_height=0.25
  PhysicalOffsetFrame Cyl2_frame: socket_parent=/bodyset/linkage2 translation=(0 0.25 0)
    Cylinder Cyl2_frame_geom_1: radius=0.03 half_height=0.25
  Ground: meshes=checkered_floor.vtp
  BodySet:
    Body linkage1: mass=0.001 [kg] mass_center=(0 0.25 0) inertia=(2.105833e-5 4.5e-7 2.105833e-5 0 0 0)
      Sphere linkage1_geom_1: radius=0.05
    Body linkage2: mass=0.001 mass_center=(0 0.25 0) inertia=(2.105833e-5 4.5e-7 2.105833e-5 0 0 0)
      Sphere linkage2_geom_1: radius=0.05
    Body block: mass=20 mass_center=(0 0 0) inertia=(0.5333333 0.5333333 0.5333333 0 0 0)
      Brick block_geom_1: half_lengths=(0.05 0.05 0.05)
  JointSet:
    PinJoint ankle: socket_parent_frame=ground_offset socket_child_frame=linkage1_offset
      Coordinate q1: range=(-6.283185 6.283185)
      PhysicalOffsetFrame ground_offset: socket_parent=/ground translation=(0 0 0)
      PhysicalOffsetFrame linkage1_offset: socket_parent=/bodyset/linkage1 translation=(0 0 0)
    PinJoint knee: socket_parent_frame=linkage1_offset socket_child_frame=linkage2_offset
      Coordinate q2: range=(-6.283185 6.283185)
      PhysicalOffsetFrame linkage1_offset: socket_parent=/bodyset/linkage1 translation=(0 0.5 0)
      PhysicalOffsetFrame linkage2_offset: socket_parent=/bodyset/linkage2 translation=(0 0 0)
    PinJoint hip: socket_parent_frame=linkage2_offset socket_child_frame=block_offset
      Coordinate q3: range=(-6.283185 6.283185)
      PhysicalOffsetFrame linkage2_offset: socket_parent=/bodyset/linkage2 translation=(0 0.5 0)
      PhysicalOffsetFrame block_offset: socket_parent=/bodyset/block translation=(0 0 0)
  ControllerSet:
    PrescribedController: actuator_list=(piston spring)
      FunctionSet ControlFunctions: Constant(value=0.1) PiecewiseLinearFunction(x=0 4 7 10 15, y=1 1 0.25 0.25 5)
  ConstraintSet:
    PointOnLineConstraint: socket_line_body=/ground socket_follower_body=/bodyset/block line_direction_vec=(0 1 0)
        point_on_line=(0 0 0) point_on_follower=(0 0 0)
  ForceSet:
    PistonActuator piston: socket_frameA=/bodyset/linkage1 socket_frameB=/bodyset/block points_are_global=false
        pointA=(0 0 0) optimal_force=200
    ControllableSpring spring: socket_frameA=/bodyset/block socket_frameB=/bodyset/linkage1 points_are_global=false
        pointA=(0 0 0) optimal_force=2000 rest_length=0.8
