# OpenSim document version 40000
Model CustomJoinTut:
  Ground
  BodySet:
    Body body1: mass=1 [kg] mass_center=(0 0 0) inertia=(0 0 0 0 0 0)
      PhysicalOffsetFrame body1Center: socket_parent=.. translation=(0 0.5 0) [meters]
        Ellipsoid body1Center_geom_1: radii=(0.1 0.5 0.1)
  JointSet:
    CustomJoint: socket_parent_frame=ground_offset socket_child_frame=body1_offset
      Coordinate q1: default_value=-0.4 range=(-2.094395 0.4745329)
      PhysicalOffsetFrame ground_offset: socket_parent=/ground translation=(0 0 0)
      PhysicalOffsetFrame body1_offset: socket_parent=/bodyset/body1 translation=(0 1 0)
      SpatialTransform:
        TransformAxis rotation1: coordinates=q1 axis=(1 0 0) LinearFunction(coefficients=1 0)
        TransformAxis rotation2: axis=(0 1 0)
        TransformAxis rotation3: axis=(0 0 1)
        TransformAxis translation1: axis=(1 0 0)
        TransformAxis translation2: axis=(0 1 0)
        TransformAxis translation3: axis=(0 0 1)
