# OpenSim document version 40000
Model tugOfWar:
  ConsoleReporter__double_ reporter: report_time_interval=0.1 [s]
      input_inputs=(/jointset/blockToGround/xTranslation|value(xValue) /jointset/blockToGround/zTranslation|value(zValue))
  Ground:
    PhysicalOffsetFrame LeftAnchor: socket_parent=.. translation=(0 0.05 0.35) [meters]
      Brick LeftAnchor_geom_1: scale_factors=(5 1 1) half_lengths=(0.05 0.05 0.05)
    PhysicalOffsetFrame RightAnchor: socket_parent=.. translation=(0 0.05 -0.35)
      Brick RightAnchor_geom_1: scale_factors=(5 1 1) half_lengths=(0.05 0.05 0.05)
  BodySet:
    Body block: mass=20 [kg] mass_center=(0 0 0) inertia=(0.1333333 0.1333333 0.1333333 0 0 0) meshes=block.vtp
  JointSet:
    FreeJoint blockToGround: socket_parent_frame=ground_offset socket_child_frame=block_offset
      Coordinate blockToGround_coord_0: range=(-1.570796 1.570796)
      Coordinate blockToGround_coord_1: range=(-1.570796 1.570796)
      Coordinate blockToGround_coord_2: range=(-1.570796 1.570796)
      Coordinate xTranslation: default_value=0.2 range=(-1 1)
      Coordinate blockToGround_coord_4: default_value=-0.00196133 range=(-1 1)
      Coordinate zTranslation: range=(-1 1)
      PhysicalOffsetFrame ground_offset: socket_parent=/ground translation=(0 0.05 0)
      PhysicalOffsetFrame block_offset: socket_parent=/bodyset/block translation=(0 0 0)
  ControllerSet:
    PrescribedController: actuator_list=(muscle1 muscle2)
      FunctionSet ControlFunctions: LinearFunction(coefficients=-0.333333 1) LinearFunction(coefficients=0.316667 0.05)
  ConstraintSet:
    ConstantDistanceConstraint: socket_body_1=/ground socket_body_2=/bodyset/block location_body_1=(0 0.05 0)
        location_body_2=(0 0 0) constant_distance=0.2
  ForceSet:
    Thelen2003Muscle muscle1: min_control=0.01 max_control=1 max_isometric_force=1000 optimal_fiber_length=0.25
        tendon_slack_length=0.1 pennation_angle_at_optimal=0 [radians] default_activation=1 default_fiber_length=0.25
      PathPoint point1: ground (0 0.05 -0.35)
      PathPoint point2: block (0 0 -0.05)
    Thelen2003Muscle muscle2: min_control=0.01 max_control=1 max_isometric_force=1000 optimal_fiber_length=0.25
        tendon_slack_length=0.1 pennation_angle_at_optimal=0 default_activation=0.05 default_fiber_length=0.25
      PathPoint point1: ground (0 0.05 0.35)
      PathPoint point2: block (0 0 0.05)
    ElasticFoundationForce contactForce:
      ContactParametersSet contact_parameters:
        ContactParameters: geometry=(cube floor) stiffness=10000000 dissipation=0.1 static_friction=0.2
            dynamic_friction=0.2 viscous_friction=0.01
    PrescribedForce ExternalForceBlock: socket_frame=/bodyset/block
      FunctionSet forceFunctions: PiecewiseLinearFunction(x=0 3, y=0 588.399) Constant(value=0) Constant(value=0)
      FunctionSet pointFunctions: Constant(value=0) Constant(value=0) Constant(value=0)
  ContactGeometrySet:
    ContactHalfSpace floor: socket_frame=/ground location=(0 0 0) orientation=(0 0 -1.570796)
    ContactMesh cube: socket_frame=/bodyset/block location=(0 0 0) filename=blockMesh.obj
