# OpenSim document version 40000
Model armModel:
  Ground
  BodySet:
    Body humerus: mass=1 [kg] mass_center=(0 0 0) inertia=(0 0 0 0 0 0)
      PhysicalOffsetFrame wrapCylinderFrame: socket_parent=.. translation=(0.14 0.3 0) [meters]
        WrapCylinder: quadrant=all radius=0.1 length=0.1
      PhysicalOffsetFrame humerusCenter: socket_parent=.. translation=(0 0.5 0)
        Ellipsoid humerusCenter_geom_1: radii=(0.1 0.5 0.1)
    Body radius: mass=1 mass_center=(0 0 0) inertia=(0 0 0 0 0 0)
      PhysicalOffsetFrame radiusCenter: socket_parent=.. translation=(0 0.5 0)
        Ellipsoid radiusCenter_geom_1: radii=(0.1 0.5 0.1)
  JointSet:
    PinJoint shoulder: socket_parent_frame=ground_offset socket_child_frame=humerus_offset
      Coordinate shoulder_coord_0: default_value=0
      PhysicalOffsetFrame ground_offset: socket_parent=/ground translation=(0 0 0)
      PhysicalOffsetFrame humerus_offset: socket_parent=/bodyset/humerus translation=(0 1 0)
    PinJoint elbow: socket_parent_frame=humerus_offset socket_child_frame=radius_offset
      Coordinate elbow_coord_0: default_value=1.570796
      PhysicalOffsetFrame humerus_offset: socket_parent=/bodyset/humerus translation=(0 0 0)
      PhysicalOffsetFrame radius_offset: socket_parent=/bodyset/radius translation=(0 1 0)
  ControllerSet:
    PrescribedController: actuator_list=biceps
      FunctionSet ControlFunctions:
        PiecewiseConstantFunction excitationFunc: x=(0 1 2 3 4 0) y=(0.01 0.01 0.01 0.01 0 0)
  ForceSet:
    Millard2012EquilibriumMuscle biceps: min_control=0.01 max_control=1 max_isometric_force=200
        optimal_fiber_length=0.6 tendon_slack_length=0.55 pennation_angle_at_optimal=0 [radians]
        minimum_activation=0.01
      PathPoint origin: humerus (0 0.8 0)
      PathPoint insertion: radius (0 0.7 0)
      PathWrap: wrap_object=wrapcylinder method=hybrid
      ActiveForceLengthCurve: minimum_value=0
      ForceVelocityCurve: concentric_slope_at_vmax=0 concentric_slope_near_vmax=0.25 isometric_slope=5
          eccentric_slope_at_vmax=0 eccentric_slope_near_vmax=0.15 max_eccentric_velocity_force_multiplier=1.4
      FiberForceLengthCurve
      TendonForceLengthCurve
